y(q) := |q*(q - 1)*(q - 2)*(q - 3)*(q - 4)|
q := 0, 0.1 .. 4
# [plot: y(q) vs q]
f(x) := sin(x) + ln(x)/x
x := 1, 1.1 .. 4
d5(x) := d^5/dx^5(f(x)) → cos(x) - 120*ln(x)/x^6 + 274/x^6
# [plot: |d5(x)| vs x]
d5(1) = 274.54
27.454*0.75^5*3.5/120 = 0.19002
49.159/24 = 2.04829
27.454*3^5/(512*120) = 0.108583
xs := 1, 1.01 .. 4
N4(x) := 0.841147 + 0.46230/0.75^1*(x - 1) - 0.80107/(2*0.75^2)*(x - 1)*(x - 1.75) + 0.42933/(6*0.75^3)*(x - 1)*(x - 1.75)*(x - 2.5) - 0.01176/(24*0.75^4)*(x - 1)*(x - 1.75)*(x - 2.5)*(x - 3.25)
T4(x) := 0.948 + 0.645*(x - 1.0734) - 0.716*(x - 1.0734)*(x - 1.6183) + 0.1676*(x - 1.0734)*(x - 1.6183)*(x - 2.5) - 0.001*(x - 1.0734)*(x - 1.6183)*(x - 2.5)*(x - 3.3817)
# [plot: f(xs), N4(xs) vs xs]
R4(x) := f(x) - N4(x)
# [plot: R4(xs) vs xs]
# [plot: f(xs), T4(xs) vs xs]
E4(x) := f(x) - T4(x)
# [plot: E4(xs) vs xs]
