f(x) := sin(x) + ln(x)/x
f(1.113) = 0.993218
x := 1.113
N2(x) := 0.841147 + 0.12352/1.5*(x - 1) - 1.49873/(2*1.5^2)*(x - 1)*(x - 2.5)
T2(x) := 1.0849 - 0.092*(x - 1.201) - 0.327*(x - 1.201)*(x - 2.5)
N3(x) := 0.841147 + 0.41440/1*(x - 1) - 1.16295/(1*2)*(x - 1)*(x - 2) + 0.99394/(1*4)*(x - 1)*(x - 2)*(x - 3)
T3(x) := 0.9946 + 0.34895*(x - 1.1142) - 0.554*(x - 1.1142)*(x - 1.926) + 0.163*(x - 1.1142)*(x - 1.926)*(x - 3.074)
N4(x) := 0.841147 + 0.46230/0.75^1*(x - 1) - 0.80107/(2*0.75^2)*(x - 1)*(x - 1.75) + 0.42933/(6*0.75^3)*(x - 1)*(x - 1.75)*(x - 2.5) - 0.01176/(24*0.75^4)*(x - 1)*(x - 1.75)*(x - 2.5)*(x - 3.25)
T4(x) := 0.948 + 0.645*(x - 1.0734) - 0.716*(x - 1.0734)*(x - 1.6183) + 0.1676*(x - 1.0734)*(x - 1.6183)*(x - 2.5) - 0.001*(x - 1.0734)*(x - 1.6183)*(x - 2.5)*(x - 3.3817)
N2(x) = 0.902652
T2(x) = 1.05308
N3(x) = 0.993253
T3(x) = 0.993329
N4(x) = 0.979319
T4(x) = 0.992584
